OpenVSP model (file version 5), 4 components.
Geometry view with OpenVSP parameter names; values to 6 digits, angles in degrees, lengths in the model's unit.
Overall bounding box: X_Min=0.275 X_Len=160 Y_Min=-32.7905 Y_Len=65.5809 Z_Min=-8.56522 Z_Len=24.6729

Fuselage "FuselageGeom"
  location (X Y Z) 0.275 0 0, rotation 0 0 0
  bounding box size 160 10 10
  Design: Length=160
  cross sections:
    n  XLocPercent  YLocPercent  ZLocPercent  shape
    0  0            0            -0.0153846   point
    1  0.0892239    0            -0.004       ellipse Ellipse_Height=2.5 Ellipse_Width=2.5
    2  0.130295     0            0            ellipse Ellipse_Height=4.5 Ellipse_Width=4.5
    3  0.202702     0            0.00541794   ellipse Ellipse_Height=8.5 Ellipse_Width=8.5
    4  0.36         0            0.00542      ellipse Ellipse_Height=9.5 Ellipse_Width=9.5
    5  0.55         0            0.00542      ellipse Ellipse_Height=10 Ellipse_Width=10
    6  0.78         0            0.00542      ellipse Ellipse_Height=8.5 Ellipse_Width=8.5
    7  1            0            0.019        general fuselage BotStr=0.83 BotTanAngle=90 CornerRad=0 Height=0 LowStr=0.83 MaxWidthLoc=0 TopStr=0.83 TopTanAngle=90 UpStr=0.83 Width=0
    8  1            0            0.019        point

Wing "Tail", child of "FuselageGeom"
  location (X Y Z) 125.674 0 3.86522, rotation 90 0 0
  bounding box size 29.8596 0.219954 12.2425
  totals: TotalSpan=12.2425 TotalProjectedSpan=12.2425 TotalChord=14.2945 TotalArea=175 TotalAR=0.856451
  root: chord 23.8241, twist 0, NACA 4-series Camber=0 CamberLoc=0.2 ThickChord=0.00916193
  sections:
    n  Span     Root_Chord  Tip_Chord  Area  Sweep    Sweep_Location  Dihedral  Twist  Twist_Location  tip airfoil
    1  12.2425  23.8241     4.76482    175   63.9945  0               0         0      0.25            biconvex ThickChord=0.0454545

Wing "WingGeom", child of "FuselageGeom"
  location (X Y Z) 53.087 3.15217 -1.85217, rotation 0 0 0
  symmetric about XZ
  bounding box size 73.1232 65.5809 2.27021
  totals: TotalSpan=58.8577 TotalProjectedSpan=58.8577 TotalChord=32.5865 TotalArea=1776 TotalAR=1.95058
  root: chord 72.3281, twist 0, NACA 4-series Camber=0.006 CamberLoc=0.4 ThickChord=0.03
  sections:
    n  Span     Root_Chord  Tip_Chord  Area     Sweep  Sweep_Location  Dihedral  Twist  Twist_Location  tip airfoil
    1  12.5219  72.3281     25.2199    610.744  75     0               0         0      0.25            NACA 4-series Camber=0.006 CamberLoc=0.4 ThickChord=0.02
    2  16.9069  25.2199     7.57797    277.256  48     0               0         0      0.25            as above

Fuselage "Engine"
  location (X Y Z) 81.375 -5.95652 -7.06522, rotation 0 0 0
  symmetric about XZ
  bounding box size 20 14.913 3
  Design: Length=20
  cross sections:
    n  XLocPercent  YLocPercent  ZLocPercent  shape
    0  0            0            0            rounded rectangle RoundRectXSec_Radius=0.4 RoundedRect_Height=3 RoundedRect_Width=3
    1  1            0            0            rounded rectangle RoundRectXSec_Radius=0.4 RoundedRect_Height=2 RoundedRect_Width=2

VSPAERO settings: Sref=1776 bref=58.8577 cref=32.5865 Xcg=68.2235 Ycg=8.92586e-09 Zcg=0.183055 AlphaStart=1 AlphaEnd=20 AlphaNpts=10 BetaStart=0 BetaEnd=0 BetaNpts=1 MachStart=0.665 MachEnd=2 MachNpts=1 ReCref=8.05e+07 Vinf=924 Rho=0.000736627
